echo both

# Define some variables
variable	temperature equal 1720.
variable	temperature2 equal 2500.
variable	tempDamp equal 0.1 # approx 0.1 ps
variable	pressure equal 1.
variable	pressureDamp equal 1.0
variable	seed equal 20000802

# Setup
units		metal
atom_style	full

# Initial configuration
# Cubic diamond lattice
lattice 	diamond 5.4307
region          myreg block 0 3 0 3 0 3
create_box      1 myreg
create_atoms    1 region myreg
variable 	mass equal 28.0855
mass            1 ${mass}

# More setup options
variable	out_freq equal 500
variable	out_freq2 equal 500
neigh_modify    delay 10 every 1
pair_style 	sw
pair_coeff 	* * Si.sw Si
timestep	0.002
thermo          ${out_freq}
thermo_style 	custom step temp pe press lx
restart 	${out_freq} Restart.lmp Restart2.lmp

# Perform minimization
minimize 1.0e-2 1.0e-3 100 1000

reset_timestep 	0

# NVT equilibration

fix             1 all nve
fix             2 all temp/csvr ${temperature2} ${temperature2} ${tempDamp} ${seed}

velocity        all create ${temperature2} ${seed} dist gaussian
run             50000

unfix           1
unfix           2

# NPT equilibration

fix             1 all nph iso ${pressure} ${pressure} ${pressureDamp}
fix             2 all temp/csvr ${temperature2} ${temperature2} ${tempDamp} ${seed}

velocity        all create ${temperature2} ${seed} dist gaussian
run             50000

unfix           1
unfix           2


# NPT equilibration
# The symmetry of the crystal structure allows us to use an isotropic barostat

fix             1 all nph iso ${pressure} ${pressure} ${pressureDamp}
fix             2 all temp/csvr ${temperature2} ${temperature} ${tempDamp} ${seed}

run             500000

unfix           1
unfix           2


# Dump trajectories in dump and dcd format
dump            myDump all atom ${out_freq2} si.lammps-dump-text
dump            myDcdDump all dcd ${out_freq2} out.dcd

# NPT + enhanced sampling

reset_timestep  0

fix             1 all nph iso ${pressure} ${pressure} ${pressureDamp}
fix             2 all temp/csvr ${temperature} ${temperature} ${tempDamp} ${seed}
fix		3 all momentum 10000 linear 1 1 1 angular

thermo          10
thermo_style 	custom step temp pe etotal press vol enthalpy

run             1000000

unfix		3
unfix		2
unfix		1

write_data	data.final
